# miscanthus-bales, scenario 2, at field

Dataset: EcoSpold 2, unit process
Geography: RER
Time period: 2000-01-01 to 2020-01-01
Technology level: current
Classification: EcoSpold01Categories: agricultural production/plant production
Scenario: Business-as-Usual
Generated by: Niels Jungbluth
Published in: Jungbluth N. 2007
Database: ecoinvent
accessRestrictedTo: 0
isCopyrightProtected: true

## General comment
Inventory refers to the production of 1 kg dry matter miscanthus-bales.

## Included activities end
The inventory includes the processes of soil cultivation, sowing, weed control, fertilisation, pest and pathogen control, harvest and balling. Machine infrastructure and a shed for machine sheltering is included. Inputs of fertilisers, pesticides and planting stocks as well as their transports to the farm are considered. The direct emissions on the field are also included. The system boundary is the field.

## Geography
Refers to an average production in Europe. Calculation based on inventory data for SE, PL, DE and GR. Production shares based on expert guess.

## Technology
Expert guess data for agricultural and harvesting technology in 2020. Use of bioenergy in tractors.

## Time period
Scenario 2 for self sufficient biofuel production in the year 2020.

## Reference product
- miscanthus-bales, scenario 2, at field: 1 kg

## Inputs from technosphere
All rows: lognormal
- ammonium nitrate, as N, at regional storehouse: 0.0022155 kg
  (4,4,1,1,1,5); application of fertilizer and average consumption
- ammonium sulphate, as N, at regional storehouse: 0.00017042 kg
  (4,4,1,1,1,5); application of fertilizer and average consumption
- calcium ammonium nitrate, as N, at regional storehouse: 0.0011077 kg
  (4,4,1,1,1,5); application of fertilizer and average consumption
- diammonium phosphate, as N, at regional storehouse: 0.00032555 kg
  (4,4,1,1,1,5); application of fertilizer and average consumption
- urea, as N, at regional storehouse: 0.00076689 kg
  (4,4,1,1,1,5); application of fertilizer and average consumption
- potassium chloride, as K2O, at regional storehouse: 0.0048359 kg
  (4,4,1,1,1,5); application of fertilizer and average consumption
- potassium sulphate, as K2O, at regional storehouse: 0.00030867 kg
  (4,4,1,1,1,5); application of fertilizer and average consumption
- lime, from carbonation, at regional storehouse: 0.0032414 kg
  (4,4,1,1,1,5); application of fertilizer and average consumption
- diammonium phosphate, as P2O5, at regional storehouse: 0.00083196 kg
  (4,4,1,1,1,5); application of fertilizer and average consumption
- single superphosphate, as P2O5, at regional storehouse: 5.9426e-5 kg
  (4,4,1,1,1,5); application of fertilizer and average consumption
- thomas meal, as P2O5, at regional storehouse: 0.00014856 kg
  (4,4,1,1,1,5); application of fertilizer and average consumption
- triple superphosphate, as P2O5, at regional storehouse: 0.0012182 kg
  (4,4,1,1,1,5); application of fertilizer and average consumption
- phosphate rock, as P2O5, beneficiated, dry, at plant: 0.00071311 kg
  (4,4,1,1,1,5); application of fertilizer and average consumption
- planting stocks, miscanthus, at field: 0.040734 unit
  (4,4,1,1,1,5); establishment of the plantation
- benzimidazole-compounds, at regional storehouse: 3.8897e-7 kg
  (4,4,1,1,1,5); pesticide use
- cyclic N-compounds, at regional storehouse: 1.4586e-6 kg
  (4,4,1,1,1,5); pesticide use
- triazine-compounds, at regional storehouse: 6.5343e-5 kg
  (4,4,1,1,1,5); pesticide use, Atrazine
- organophosphorus-compounds, at regional storehouse: 4.0128e-5 kg
  (4,4,1,1,1,5); pesticide use
- BTL-fuel, used by tractor: 0.0050445 kg
  (4,4,1,1,1,5); machinery use
- transport, lorry 32t, Euro 5, BTL-fuel: 0.0033629 tkm
  (4,5,na,na,na,na); standard distances for transport of materials
- transport, van <3.5t: 1.1973e-5 tkm
  (4,5,na,na,na,na); standard distances for transport of materials
- transport, barge: 0.019309 tkm
  (4,5,na,na,na,na); standard distances for transport of materials
- transport, freight, rail: 0.0027521 tkm
  (4,5,na,na,na,na); standard distances for transport of materials

## Inputs from nature
All rows: lognormal
- Carbon dioxide, in air: 1.7248 kg
  (3,4,1,1,1,5); carbon uptake of plants
- Energy, gross calorific value, in biomass: 18.4 MJ
  (3,4,1,1,1,5); energy content of harvested product
- Water, rain: 0.55713 m3
  (3,4,1,1,1,5); average rainfall in the region during the plantation
- Water, river: 0.19603 m3
  (4,4,1,1,1,5); water used for irrigation
- Occupation, arable: 0.79029 m2a
  (3,4,1,1,1,5); land occupation
- Transformation, from arable: 0.20663 m2
  (3,4,1,1,1,5); 80% of total transformation
- Transformation, from pasture and meadow, extensive: 0.078257 m2
  (3,4,1,1,1,5); transformation of set aside land
- Transformation, to arable: 0.28488 m2
  (3,4,1,1,1,5); transformation to energy crops

## Emissions to nature
All rows: lognormal
- Ammonia: 0.00025276 kg
  (4,4,1,5,3,5); model calculation for emissions based on fertilizer application
- Dinitrogen monoxide: 0.00018273 kg
  (4,4,1,5,3,5); model calculation for emissions based on fertilizer application
- Isoprene: 0.0015558 kg
  (5,na,na,3,3,3); model calculation for biogenic emissions based on literature
- Terpenes: 8.5529e-5 kg
  (5,na,na,3,3,3); model calculation for biogenic emissions based on literature
- Nitrogen oxides: 3.8374e-5 kg
  (4,4,1,5,3,5); model calculation for emissions based on fertilizer application
- Cadmium: 7.2322e-8 kg
  (4,4,1,5,3,5); input-output balance for seeds, products and fertilizer
- Chromium: 2.5024e-6 kg
  (4,4,1,5,3,5); input-output balance for seeds, products and fertilizer
- Copper: -4.5266e-6 kg
  (4,4,1,5,3,5); input-output balance for seeds, products and fertilizer
- Lead: -8.1134e-7 kg
  (4,4,1,5,3,5); input-output balance for seeds, products and fertilizer
- Mercury: -9.4774e-9 kg
  (4,4,1,5,3,5); input-output balance for seeds, products and fertilizer
- Nickel: -1.5715e-6 kg
  (4,4,1,5,3,5); input-output balance for seeds, products and fertilizer
- Zinc: -2.0881e-5 kg
  (4,4,1,5,3,5); input-output balance for seeds, products and fertilizer
- Atrazine: 6.5343e-5 kg
  (4,4,1,5,3,5); pesticide application, 500g/l
- Carbendazim: 3.8897e-7 kg
  (4,4,1,5,3,5); pesticide application, sportak alpha 380 EC
- Glyphosate: 4.0128e-5 kg
  (4,4,1,5,3,5); Roundup 360 SL, 360g/l
- Prochloraz: 1.4586e-6 kg
  (4,4,1,5,3,5); pesticide application, sportak alpha 380 EC
- Nitrate: 0.009868 kg
  (4,4,1,5,3,5); model calculation for emissions based on fertilizer application
- Phosphate: 0.00010476, 0.0003227 kg (2 entries, compartments not in this file)
  (4,4,1,5,3,5); model calculation for emissions based on fertilizer application
- Phosphorus: 3.6424e-7 kg
  (4,4,1,5,3,5); emission due to erosion

## Sampling procedure
Data were compiled by experts from Poland, Greece, Germany and Sweden from statistics, pilot network, fertilising recommendations, documents from extension services, information provided by retailers, literature and expert knowledge. The production data were verified and adjusted by the project team.

## Extrapolations
based on scenario definitions

## Review by Niels Jungbluth 2007-07-03T13:30:34
automatic validation
otherDetails
