# miscanthus-bales, at field

Dataset: EcoSpold 1, unit process
Functional unit: 1 kg
Category: agricultural production / plant production
Geography: RER
Time period: 2000 to 2000
Production volume: So far only limited experiences.
Share of production covered: 10 %
Generated by: Niels Jungbluth
copyright: true
accessRestrictedTo: 0

## General comment
Inventory refers to the production of 1 kg dry matter miscanthus-bales.

## Included processes
The inventory includes the processes of soil cultivation, sowing, weed control, fertilisation, pest and pathogen control, harvest and balling. Machine infrastructure and a shed for machine sheltering is included. Inputs of fertilisers, pesticides and planting stocks as well as their transports to the farm are considered. The direct emissions on the field are also included. The system boundary is the field.

## Geography
Refers to an average production in Europe. Calculation based on inventory data for SE, PL, DE and GR. Production shares based on expert guess.

## Technology
Average production of today

## Time period
Starting point scenario for average agricultural and harvesting technology in the year 2004.

## Reference product
- miscanthus-bales, at field [RER]: 1 kg

## Inputs from technosphere
- ammonium nitrate, as N, at regional storehouse [RER]: 0.0019246 kg; lognormal SD95 1.3221
  (4,4,1,1,1,5); application of fertilizer and average consumption
- ammonium sulphate, as N, at regional storehouse [RER]: 0.00014805 kg; lognormal SD95 1.3221
  (4,4,1,1,1,5); application of fertilizer and average consumption
- calcium ammonium nitrate, as N, at regional storehouse [RER]: 0.00096232 kg; lognormal SD95 1.3221
  (4,4,1,1,1,5); application of fertilizer and average consumption
- diammonium phosphate, as N, at regional storehouse [RER]: 0.00033747 kg; lognormal SD95 1.3221
  (4,4,1,1,1,5); application of fertilizer and average consumption
- urea, as N, at regional storehouse [RER]: 0.00066622 kg; lognormal SD95 1.3221
  (4,4,1,1,1,5); application of fertilizer and average consumption
- potassium chloride, as K2O, at regional storehouse [RER]: 0.0047692 kg; lognormal SD95 1.3221
  (4,4,1,1,1,5); application of fertilizer and average consumption
- potassium sulphate, as K2O, at regional storehouse [RER]: 0.00030442 kg; lognormal SD95 1.3221
  (4,4,1,1,1,5); application of fertilizer and average consumption
- lime, from carbonation, at regional storehouse [CH]: 0.0035607 kg; lognormal SD95 1.3221
  (4,4,1,1,1,5); application of fertilizer and average consumption
- diammonium phosphate, as P2O5, at regional storehouse [RER]: 0.00086241 kg; lognormal SD95 1.3221
  (4,4,1,1,1,5); application of fertilizer and average consumption
- single superphosphate, as P2O5, at regional storehouse [RER]: 6.1601e-5 kg; lognormal SD95 1.3221
  (4,4,1,1,1,5); application of fertilizer and average consumption
- thomas meal, as P2O5, at regional storehouse [RER]: 0.000154 kg; lognormal SD95 1.3221
  (4,4,1,1,1,5); application of fertilizer and average consumption
- triple superphosphate, as P2O5, at regional storehouse [RER]: 0.0012628 kg; lognormal SD95 1.3221
  (4,4,1,1,1,5); application of fertilizer and average consumption
- phosphate rock, as P2O5, beneficiated, dry, at plant [MA]: 0.00073921 kg; lognormal SD95 1.3221
  (4,4,1,1,1,5); application of fertilizer and average consumption
- planting stocks, miscanthus, at field [RER]: 0.034563 unit; lognormal SD95 1.3221
  (4,4,1,1,1,5); establishment of the plantation
- benzimidazole-compounds, at regional storehouse [RER]: 3.5015e-7 kg; lognormal SD95 1.3221
  (4,4,1,1,1,5); pesticide use
- cyclic N-compounds, at regional storehouse [CH]: 1.3131e-6 kg; lognormal SD95 1.3221
  (4,4,1,1,1,5); pesticide use
- triazine-compounds, at regional storehouse [RER]: 4.5222e-5 kg; lognormal SD95 1.3221
  (4,4,1,1,1,5); pesticide use, Atrazine
- organophosphorus-compounds, at regional storehouse [RER]: 3.2392e-5 kg; lognormal SD95 1.3221
  (4,4,1,1,1,5); pesticide use
- diesel, used by tractor [RER]: 0.0042836 kg; lognormal SD95 1.3221
  (4,4,1,1,1,5); machinery use
- transport, lorry 32t [RER]: 0.0032227 tkm; lognormal SD95 2.095
  (4,5,na,na,na,na); standard distances for transport of materials
- transport, van <3.5t [RER]: 9.8053e-6 tkm; lognormal SD95 2.095
  (4,5,na,na,na,na); standard distances for transport of materials
- transport, barge [RER]: 0.017992 tkm; lognormal SD95 2.095
  (4,5,na,na,na,na); standard distances for transport of materials
- transport, freight, rail [RER]: 0.0041158 tkm; lognormal SD95 2.095
  (4,5,na,na,na,na); standard distances for transport of materials

## Inputs from nature
- Carbon dioxide, in air [resource, in air]: 1.7248 kg; lognormal SD95 1.261
  (3,4,1,1,1,5); carbon uptake of plants
- Energy, gross calorific value, in biomass [resource, biotic]: 18.4 MJ; lognormal SD95 1.261
  (3,4,1,1,1,5); energy content of harvested product
- Water, rain [resource, in water]: 0.49212 m3; lognormal SD95 1.261
  (3,4,1,1,1,5); average rainfall in the region during the plantation
- Water, river [resource, in water]: 0.13567 m3; lognormal SD95 1.3221
  (4,4,1,1,1,5); water used for irrigation
- Occupation, arable [resource, land]: 0.66801 m2a; lognormal SD95 1.2788
  (3,4,1,1,1,5); land occupation
- Transformation, from pasture and meadow, extensive [resource, land]: 0.0334 m2; lognormal SD95 1.3377
  (3,4,1,1,1,5); transformation of set aside land
- Transformation, to arable [resource, land]: 0.0334 m2; lognormal SD95 1.3377
  (3,4,1,1,1,5); transformation to energy crops

## Emissions to nature
- Ammonia [air, low population density]: 0.00022223 kg; lognormal SD95 1.4751
  (4,4,1,5,3,5); model calculation for emissions based on fertilizer application
- Dinitrogen monoxide [air, low population density]: 0.00016702 kg; lognormal SD95 1.7012
  (4,4,1,5,3,5); model calculation for emissions based on fertilizer application
- Isoprene [air, low population density]: 0.0014456 kg; lognormal SD95 5.315
  (5,na,na,3,3,3); model calculation for biogenic emissions based on literature
- Terpenes [air, low population density]: 7.2295e-5 kg; lognormal SD95 5.315
  (5,na,na,3,3,3); model calculation for biogenic emissions based on literature
- Nitrogen oxides [air, low population density]: 3.5075e-5 kg; lognormal SD95 1.7012
  (4,4,1,5,3,5); model calculation for emissions based on fertilizer application
- Cadmium [soil, agricultural]: 8.2164e-8 kg; lognormal SD95 1.7012
  (4,4,1,5,3,5); input-output balance for seeds, products and fertilizer
- Chromium [soil, agricultural]: 2.6237e-6 kg; lognormal SD95 1.7012
  (4,4,1,5,3,5); input-output balance for seeds, products and fertilizer
- Copper [soil, agricultural]: -4.523e-6 kg; lognormal SD95 1.7012
  (4,4,1,5,3,5); input-output balance for seeds, products and fertilizer
- Lead [soil, agricultural]: -8.0846e-7 kg; lognormal SD95 1.7012
  (4,4,1,5,3,5); input-output balance for seeds, products and fertilizer
- Mercury [soil, agricultural]: -9.5071e-9 kg; lognormal SD95 1.7012
  (4,4,1,5,3,5); input-output balance for seeds, products and fertilizer
- Nickel [soil, agricultural]: -1.5767e-6 kg; lognormal SD95 1.7012
  (4,4,1,5,3,5); input-output balance for seeds, products and fertilizer
- Zinc [soil, agricultural]: -2.0789e-5 kg; lognormal SD95 1.7012
  (4,4,1,5,3,5); input-output balance for seeds, products and fertilizer
- Atrazine [soil, agricultural]: 4.5222e-5 kg; lognormal SD95 1.4751
  (4,4,1,5,3,5); pesticide application, 500g/l
- Carbendazim [soil, agricultural]: 3.5015e-7 kg; lognormal SD95 1.4751
  (4,4,1,5,3,5); pesticide application, sportak alpha 380 EC
- Glyphosate [soil, agricultural]: 3.2392e-5 kg; lognormal SD95 1.4751
  (4,4,1,5,3,5); Roundup 360 SL, 360g/l
- Prochloraz [soil, agricultural]: 1.3131e-6 kg; lognormal SD95 1.4751
  (4,4,1,5,3,5); pesticide application, sportak alpha 380 EC
- Nitrate [water, ground-]: 0.0094013 kg; lognormal SD95 1.7012
  (4,4,1,5,3,5); model calculation for emissions based on fertilizer application
- Phosphate [water, ground-]: 1.2283e-5 kg; lognormal SD95 1.7012
  (4,4,1,5,3,5); model calculation for emissions based on fertilizer application
- Phosphate [water, river]: 3.9954e-5 kg; lognormal SD95 1.7012
  (4,4,1,5,3,5); model calculation for emissions based on fertilizer application
- Phosphorus [water, river]: 3.0788e-7 kg; lognormal SD95 1.7012
  (4,4,1,5,3,5); emission due to erosion

## Sampling procedure
Data were compiled by experts from Poland, Greece, Germany and Sweden from statistics, pilot network, fertilising recommendations, documents from extension services, information provided by retailers, literature and expert knowledge. The production data were verified and adjusted by the project team.

## Sources
- Jungbluth N., Faist Emmenegger M., Frischknecht R., Tuchschmid M., 2007, LCA of BTL-fuel production: Inventory Analysis, RENEW project report Del. 5.2.7, 0, ESU-services Ltd., Uster, CH
- Nikolaou A, 2006, Regional inventory data for biomass production: Southern Europe, RENEW project report Del. 5.2.6, 0, ESU-services Ltd., Uster, CH
- Lantz M, 2006, Regional inventory data for biomass production: Northern Europe, RENEW project report Del. 5.2.4, 0, ESU-services Ltd., Uster, CH
- Ganko E, 2006, Regional inventory data for biomass: Central-Eastern Europe, RENEW project report Del. 5.2.5, 0, ESU-services Ltd., Uster, CH

## Validation
automatic validation
none

# miscanthus-bales, scenario 1, at field

Dataset: EcoSpold 1, unit process
Functional unit: 1 kg
Category: agricultural production / plant production
Geography: RER
Time period: 2000 to 2020
Production volume: So far only limited experiences.
Share of production covered: 0 %
Generated by: Niels Jungbluth
copyright: true
accessRestrictedTo: 0

## General comment
Inventory refers to the production of 1 kg dry matter miscanthus-bales.

## Included processes
The inventory includes the processes of soil cultivation, sowing, weed control, fertilisation, pest and pathogen control, harvest and balling. Machine infrastructure and a shed for machine sheltering is included. Inputs of fertilisers, pesticides and planting stocks as well as their transports to the farm are considered. The direct emissions on the field are also included. The system boundary is the field.

## Geography
Refers to an average production in Europe. Calculation based on inventory data for SE, PL, DE and GR. Production shares based on expert guess.

## Technology
Expert guess data for agricultural and harvesting technology in 2020

## Time period
Scenario 1 for maximized biofuel production in the year 2020

## Reference product
- miscanthus-bales, scenario 1, at field [RER]: 1 kg

## Inputs from technosphere
- ammonium nitrate, as N, at regional storehouse [RER]: 0.0019833 kg; lognormal SD95 1.3221
  (4,4,1,1,1,5); application of fertilizer and average consumption
- ammonium sulphate, as N, at regional storehouse [RER]: 0.00015256 kg; lognormal SD95 1.3221
  (4,4,1,1,1,5); application of fertilizer and average consumption
- calcium ammonium nitrate, as N, at regional storehouse [RER]: 0.00099167 kg; lognormal SD95 1.3221
  (4,4,1,1,1,5); application of fertilizer and average consumption
- diammonium phosphate, as N, at regional storehouse [RER]: 0.0003055 kg; lognormal SD95 1.3221
  (4,4,1,1,1,5); application of fertilizer and average consumption
- urea, as N, at regional storehouse [RER]: 0.00068654 kg; lognormal SD95 1.3221
  (4,4,1,1,1,5); application of fertilizer and average consumption
- potassium chloride, as K2O, at regional storehouse [RER]: 0.0039985 kg; lognormal SD95 1.3221
  (4,4,1,1,1,5); application of fertilizer and average consumption
- potassium sulphate, as K2O, at regional storehouse [RER]: 0.00025523 kg; lognormal SD95 1.3221
  (4,4,1,1,1,5); application of fertilizer and average consumption
- lime, from carbonation, at regional storehouse [CH]: 0.0023988 kg; lognormal SD95 1.3221
  (4,4,1,1,1,5); application of fertilizer and average consumption
- diammonium phosphate, as P2O5, at regional storehouse [RER]: 0.00078071 kg; lognormal SD95 1.3221
  (4,4,1,1,1,5); application of fertilizer and average consumption
- single superphosphate, as P2O5, at regional storehouse [RER]: 5.5765e-5 kg; lognormal SD95 1.3221
  (4,4,1,1,1,5); application of fertilizer and average consumption
- thomas meal, as P2O5, at regional storehouse [RER]: 0.00013941 kg; lognormal SD95 1.3221
  (4,4,1,1,1,5); application of fertilizer and average consumption
- triple superphosphate, as P2O5, at regional storehouse [RER]: 0.0011432 kg; lognormal SD95 1.3221
  (4,4,1,1,1,5); application of fertilizer and average consumption
- phosphate rock, as P2O5, beneficiated, dry, at plant [MA]: 0.00066918 kg; lognormal SD95 1.3221
  (4,4,1,1,1,5); application of fertilizer and average consumption
- planting stocks, miscanthus, at field [RER]: 0.025138 unit; lognormal SD95 1.3221
  (4,4,1,1,1,5); establishment of the plantation
- benzimidazole-compounds, at regional storehouse [RER]: 2.4004e-7 kg; lognormal SD95 1.3221
  (4,4,1,1,1,5); pesticide use
- cyclic N-compounds, at regional storehouse [CH]: 9.0016e-7 kg; lognormal SD95 1.3221
  (4,4,1,1,1,5); pesticide use
- triazine-compounds, at regional storehouse [RER]: 4.0325e-5 kg; lognormal SD95 1.3221
  (4,4,1,1,1,5); pesticide use, Atrazine
- organophosphorus-compounds, at regional storehouse [RER]: 2.6924e-5 kg; lognormal SD95 1.3221
  (4,4,1,1,1,5); pesticide use
- diesel, used by tractor [RER]: 0.0033496 kg; lognormal SD95 1.3221
  (4,4,1,1,1,5); machinery use
- transport, lorry 32t, Euro 5, diesel [RER]: 0.0034688 tkm; lognormal SD95 2.095
  (4,5,na,na,na,na); standard distances for transport of materials
- transport, van <3.5t [RER]: 7.4534e-6 tkm; lognormal SD95 2.095
  (4,5,na,na,na,na); standard distances for transport of materials
- transport, barge [RER]: 0.021702 tkm; lognormal SD95 2.095
  (4,5,na,na,na,na); standard distances for transport of materials
- transport, freight, rail [RER]: 0.0042565 tkm; lognormal SD95 2.095
  (4,5,na,na,na,na); standard distances for transport of materials

## Inputs from nature
- Carbon dioxide, in air [resource, in air]: 1.7248 kg; lognormal SD95 1.261
  (3,4,1,1,1,5); carbon uptake of plants
- Energy, gross calorific value, in biomass [resource, biotic]: 18.4 MJ; lognormal SD95 1.261
  (3,4,1,1,1,5); energy content of harvested product
- Water, rain [resource, in water]: 0.34382 m3; lognormal SD95 1.261
  (3,4,1,1,1,5); average rainfall in the region during the plantation
- Water, river [resource, in water]: 0.12097 m3; lognormal SD95 1.3221
  (4,4,1,1,1,5); water used for irrigation
- Occupation, arable [resource, land]: 0.4877 m2a; lognormal SD95 1.2788
  (3,4,1,1,1,5); land occupation
- Transformation, from pasture and meadow, extensive [resource, land]: 0.024385 m2; lognormal SD95 1.3377
  (3,4,1,1,1,5); transformation of set aside land
- Transformation, to arable [resource, land]: 0.024385 m2; lognormal SD95 1.3377
  (3,4,1,1,1,5); transformation to energy crops

## Emissions to nature
- Ammonia [air, low population density]: 0.00022696 kg; lognormal SD95 1.4751
  (4,4,1,5,3,5); model calculation for emissions based on fertilizer application
- Dinitrogen monoxide [air, low population density]: 0.00016786 kg; lognormal SD95 1.7012
  (4,4,1,5,3,5); model calculation for emissions based on fertilizer application
- Isoprene [air, low population density]: 0.0015656 kg; lognormal SD95 5.315
  (5,na,na,3,3,3); model calculation for biogenic emissions based on literature
- Terpenes [air, low population density]: 5.2782e-5 kg; lognormal SD95 5.315
  (5,na,na,3,3,3); model calculation for biogenic emissions based on literature
- Nitrogen oxides [air, low population density]: 3.525e-5 kg; lognormal SD95 1.7012
  (4,4,1,5,3,5); model calculation for emissions based on fertilizer application
- Cadmium [soil, agricultural]: 5.538e-8 kg; lognormal SD95 1.7012
  (4,4,1,5,3,5); input-output balance for seeds, products and fertilizer
- Chromium [soil, agricultural]: 2.2804e-6 kg; lognormal SD95 1.7012
  (4,4,1,5,3,5); input-output balance for seeds, products and fertilizer
- Copper [soil, agricultural]: -4.5689e-6 kg; lognormal SD95 1.7012
  (4,4,1,5,3,5); input-output balance for seeds, products and fertilizer
- Lead [soil, agricultural]: -8.3705e-7 kg; lognormal SD95 1.7012
  (4,4,1,5,3,5); input-output balance for seeds, products and fertilizer
- Mercury [soil, agricultural]: -9.5404e-9 kg; lognormal SD95 1.7012
  (4,4,1,5,3,5); input-output balance for seeds, products and fertilizer
- Nickel [soil, agricultural]: -1.6075e-6 kg; lognormal SD95 1.7012
  (4,4,1,5,3,5); input-output balance for seeds, products and fertilizer
- Zinc [soil, agricultural]: -2.1406e-5 kg; lognormal SD95 1.7012
  (4,4,1,5,3,5); input-output balance for seeds, products and fertilizer
- Atrazine [soil, agricultural]: 4.0325e-5 kg; lognormal SD95 1.4751
  (4,4,1,5,3,5); pesticide application, 500g/l
- Carbendazim [soil, agricultural]: 2.4004e-7 kg; lognormal SD95 1.4751
  (4,4,1,5,3,5); pesticide application, sportak alpha 380 EC
- Glyphosate [soil, agricultural]: 2.6924e-5 kg; lognormal SD95 1.4751
  (4,4,1,5,3,5); Roundup 360 SL, 360g/l
- Prochloraz [soil, agricultural]: 9.0016e-7 kg; lognormal SD95 1.4751
  (4,4,1,5,3,5); pesticide application, sportak alpha 380 EC
- Nitrate [water, ground-]: 0.0094703 kg; lognormal SD95 1.7012
  (4,4,1,5,3,5); model calculation for emissions based on fertilizer application
- Phosphate [water, ground-]: 8.9675e-6 kg; lognormal SD95 1.7012
  (4,4,1,5,3,5); model calculation for emissions based on fertilizer application
- Phosphate [water, river]: 2.9893e-5 kg; lognormal SD95 1.7012
  (4,4,1,5,3,5); model calculation for emissions based on fertilizer application
- Phosphorus [water, river]: 2.2478e-7 kg; lognormal SD95 1.7012
  (4,4,1,5,3,5); emission due to erosion

## Sampling procedure
Data were compiled by experts from Poland, Greece, Germany and Sweden from statistics, pilot network, fertilising recommendations, documents from extension services, information provided by retailers, literature and expert knowledge. The production data were verified and adjusted by the project team.

## Extrapolations
based on scenario definitions

## Sources
- Jungbluth N., Faist Emmenegger M., Frischknecht R., Tuchschmid M., 2007, LCA of BTL-fuel production: Inventory Analysis, RENEW project report Del. 5.2.7, 0, ESU-services Ltd., Uster, CH
- Nikolaou A, 2006, Regional inventory data for biomass production: Southern Europe, RENEW project report Del. 5.2.6, 0, ESU-services Ltd., Uster, CH
- Lantz M, 2006, Regional inventory data for biomass production: Northern Europe, RENEW project report Del. 5.2.4, 0, ESU-services Ltd., Uster, CH
- Ganko E, 2006, Regional inventory data for biomass: Central-Eastern Europe, RENEW project report Del. 5.2.5, 0, ESU-services Ltd., Uster, CH

## Validation
automatic validation
none

# miscanthus-bales, scenario 2, at field

Dataset: EcoSpold 1, unit process
Functional unit: 1 kg
Category: agricultural production / plant production
Geography: RER
Time period: 2000 to 2020
Production volume: So far only limited experiences.
Share of production covered: 0 %
Generated by: Niels Jungbluth
copyright: true
accessRestrictedTo: 0

## General comment
Inventory refers to the production of 1 kg dry matter miscanthus-bales.

## Included processes
The inventory includes the processes of soil cultivation, sowing, weed control, fertilisation, pest and pathogen control, harvest and balling. Machine infrastructure and a shed for machine sheltering is included. Inputs of fertilisers, pesticides and planting stocks as well as their transports to the farm are considered. The direct emissions on the field are also included. The system boundary is the field.

## Geography
Refers to an average production in Europe. Calculation based on inventory data for SE, PL, DE and GR. Production shares based on expert guess.

## Technology
Expert guess data for agricultural and harvesting technology in 2020. Use of bioenergy in tractors.

## Time period
Scenario 2 for self sufficient biofuel production in the year 2020.

## Reference product
- miscanthus-bales, scenario 2, at field [RER]: 1 kg

## Inputs from technosphere
- ammonium nitrate, as N, at regional storehouse [RER]: 0.0022155 kg; lognormal SD95 1.3221
  (4,4,1,1,1,5); application of fertilizer and average consumption
- ammonium sulphate, as N, at regional storehouse [RER]: 0.00017042 kg; lognormal SD95 1.3221
  (4,4,1,1,1,5); application of fertilizer and average consumption
- calcium ammonium nitrate, as N, at regional storehouse [RER]: 0.0011077 kg; lognormal SD95 1.3221
  (4,4,1,1,1,5); application of fertilizer and average consumption
- diammonium phosphate, as N, at regional storehouse [RER]: 0.00032555 kg; lognormal SD95 1.3221
  (4,4,1,1,1,5); application of fertilizer and average consumption
- urea, as N, at regional storehouse [RER]: 0.00076689 kg; lognormal SD95 1.3221
  (4,4,1,1,1,5); application of fertilizer and average consumption
- potassium chloride, as K2O, at regional storehouse [RER]: 0.0048359 kg; lognormal SD95 1.3221
  (4,4,1,1,1,5); application of fertilizer and average consumption
- potassium sulphate, as K2O, at regional storehouse [RER]: 0.00030867 kg; lognormal SD95 1.3221
  (4,4,1,1,1,5); application of fertilizer and average consumption
- lime, from carbonation, at regional storehouse [CH]: 0.0032414 kg; lognormal SD95 1.3221
  (4,4,1,1,1,5); application of fertilizer and average consumption
- diammonium phosphate, as P2O5, at regional storehouse [RER]: 0.00083196 kg; lognormal SD95 1.3221
  (4,4,1,1,1,5); application of fertilizer and average consumption
- single superphosphate, as P2O5, at regional storehouse [RER]: 5.9426e-5 kg; lognormal SD95 1.3221
  (4,4,1,1,1,5); application of fertilizer and average consumption
- thomas meal, as P2O5, at regional storehouse [RER]: 0.00014856 kg; lognormal SD95 1.3221
  (4,4,1,1,1,5); application of fertilizer and average consumption
- triple superphosphate, as P2O5, at regional storehouse [RER]: 0.0012182 kg; lognormal SD95 1.3221
  (4,4,1,1,1,5); application of fertilizer and average consumption
- phosphate rock, as P2O5, beneficiated, dry, at plant [MA]: 0.00071311 kg; lognormal SD95 1.3221
  (4,4,1,1,1,5); application of fertilizer and average consumption
- planting stocks, miscanthus, at field [RER]: 0.040734 unit; lognormal SD95 1.3221
  (4,4,1,1,1,5); establishment of the plantation
- benzimidazole-compounds, at regional storehouse [RER]: 3.8897e-7 kg; lognormal SD95 1.3221
  (4,4,1,1,1,5); pesticide use
- cyclic N-compounds, at regional storehouse [CH]: 1.4586e-6 kg; lognormal SD95 1.3221
  (4,4,1,1,1,5); pesticide use
- triazine-compounds, at regional storehouse [RER]: 6.5343e-5 kg; lognormal SD95 1.3221
  (4,4,1,1,1,5); pesticide use, Atrazine
- organophosphorus-compounds, at regional storehouse [RER]: 4.0128e-5 kg; lognormal SD95 1.3221
  (4,4,1,1,1,5); pesticide use
- BTL-fuel, used by tractor [RER]: 0.0050445 kg; lognormal SD95 1.3221
  (4,4,1,1,1,5); machinery use
- transport, lorry 32t, Euro 5, BTL-fuel [RER]: 0.0033629 tkm; lognormal SD95 2.095
  (4,5,na,na,na,na); standard distances for transport of materials
- transport, van <3.5t [RER]: 1.1973e-5 tkm; lognormal SD95 2.095
  (4,5,na,na,na,na); standard distances for transport of materials
- transport, barge [RER]: 0.019309 tkm; lognormal SD95 2.095
  (4,5,na,na,na,na); standard distances for transport of materials
- transport, freight, rail [RER]: 0.0027521 tkm; lognormal SD95 2.095
  (4,5,na,na,na,na); standard distances for transport of materials

## Inputs from nature
- Carbon dioxide, in air [resource, in air]: 1.7248 kg; lognormal SD95 1.261
  (3,4,1,1,1,5); carbon uptake of plants
- Energy, gross calorific value, in biomass [resource, biotic]: 18.4 MJ; lognormal SD95 1.261
  (3,4,1,1,1,5); energy content of harvested product
- Water, rain [resource, in water]: 0.55713 m3; lognormal SD95 1.261
  (3,4,1,1,1,5); average rainfall in the region during the plantation
- Water, river [resource, in water]: 0.19603 m3; lognormal SD95 1.3221
  (4,4,1,1,1,5); water used for irrigation
- Occupation, arable [resource, land]: 0.79029 m2a; lognormal SD95 1.2788
  (3,4,1,1,1,5); land occupation
- Transformation, from arable [resource, land]: 0.20663 m2; lognormal SD95 1.3377
  (3,4,1,1,1,5); 80% of total transformation
- Transformation, from pasture and meadow, extensive [resource, land]: 0.078257 m2; lognormal SD95 1.3377
  (3,4,1,1,1,5); transformation of set aside land
- Transformation, to arable [resource, land]: 0.28488 m2; lognormal SD95 1.3377
  (3,4,1,1,1,5); transformation to energy crops

## Emissions to nature
- Ammonia [air, low population density]: 0.00025276 kg; lognormal SD95 1.4751
  (4,4,1,5,3,5); model calculation for emissions based on fertilizer application
- Dinitrogen monoxide [air, low population density]: 0.00018273 kg; lognormal SD95 1.7012
  (4,4,1,5,3,5); model calculation for emissions based on fertilizer application
- Isoprene [air, low population density]: 0.0015558 kg; lognormal SD95 5.315
  (5,na,na,3,3,3); model calculation for biogenic emissions based on literature
- Terpenes [air, low population density]: 8.5529e-5 kg; lognormal SD95 5.315
  (5,na,na,3,3,3); model calculation for biogenic emissions based on literature
- Nitrogen oxides [air, low population density]: 3.8374e-5 kg; lognormal SD95 1.7012
  (4,4,1,5,3,5); model calculation for emissions based on fertilizer application
- Cadmium [soil, agricultural]: 7.2322e-8 kg; lognormal SD95 1.7012
  (4,4,1,5,3,5); input-output balance for seeds, products and fertilizer
- Chromium [soil, agricultural]: 2.5024e-6 kg; lognormal SD95 1.7012
  (4,4,1,5,3,5); input-output balance for seeds, products and fertilizer
- Copper [soil, agricultural]: -4.5266e-6 kg; lognormal SD95 1.7012
  (4,4,1,5,3,5); input-output balance for seeds, products and fertilizer
- Lead [soil, agricultural]: -8.1134e-7 kg; lognormal SD95 1.7012
  (4,4,1,5,3,5); input-output balance for seeds, products and fertilizer
- Mercury [soil, agricultural]: -9.4774e-9 kg; lognormal SD95 1.7012
  (4,4,1,5,3,5); input-output balance for seeds, products and fertilizer
- Nickel [soil, agricultural]: -1.5715e-6 kg; lognormal SD95 1.7012
  (4,4,1,5,3,5); input-output balance for seeds, products and fertilizer
- Zinc [soil, agricultural]: -2.0881e-5 kg; lognormal SD95 1.7012
  (4,4,1,5,3,5); input-output balance for seeds, products and fertilizer
- Atrazine [soil, agricultural]: 6.5343e-5 kg; lognormal SD95 1.4751
  (4,4,1,5,3,5); pesticide application, 500g/l
- Carbendazim [soil, agricultural]: 3.8897e-7 kg; lognormal SD95 1.4751
  (4,4,1,5,3,5); pesticide application, sportak alpha 380 EC
- Glyphosate [soil, agricultural]: 4.0128e-5 kg; lognormal SD95 1.4751
  (4,4,1,5,3,5); Roundup 360 SL, 360g/l
- Prochloraz [soil, agricultural]: 1.4586e-6 kg; lognormal SD95 1.4751
  (4,4,1,5,3,5); pesticide application, sportak alpha 380 EC
- Nitrate [water, ground-]: 0.009868 kg; lognormal SD95 1.7012
  (4,4,1,5,3,5); model calculation for emissions based on fertilizer application
- Phosphate [water, ground-]: 0.00010476 kg; lognormal SD95 1.7012
  (4,4,1,5,3,5); model calculation for emissions based on fertilizer application
- Phosphate [water, river]: 0.0003227 kg; lognormal SD95 1.7012
  (4,4,1,5,3,5); model calculation for emissions based on fertilizer application
- Phosphorus [water, river]: 3.6424e-7 kg; lognormal SD95 1.7012
  (4,4,1,5,3,5); emission due to erosion

## Sampling procedure
Data were compiled by experts from Poland, Greece, Germany and Sweden from statistics, pilot network, fertilising recommendations, documents from extension services, information provided by retailers, literature and expert knowledge. The production data were verified and adjusted by the project team.

## Extrapolations
based on scenario definitions

## Sources
- Jungbluth N., Faist Emmenegger M., Frischknecht R., Tuchschmid M., 2007, LCA of BTL-fuel production: Inventory Analysis, RENEW project report Del. 5.2.7, 0, ESU-services Ltd., Uster, CH
- Nikolaou A, 2006, Regional inventory data for biomass production: Southern Europe, RENEW project report Del. 5.2.6, 0, ESU-services Ltd., Uster, CH
- Lantz M, 2006, Regional inventory data for biomass production: Northern Europe, RENEW project report Del. 5.2.4, 0, ESU-services Ltd., Uster, CH
- Ganko E, 2006, Regional inventory data for biomass: Central-Eastern Europe, RENEW project report Del. 5.2.5, 0, ESU-services Ltd., Uster, CH

## Validation
automatic validation
none

# planting stocks, miscanthus, at field

Dataset: EcoSpold 1, unit process
Functional unit: 1 unit
Category: agricultural production / plant production
Geography: RER
Time period: 2000 to 2000
Production volume: So far only limited experiences.
Generated by: Niels Jungbluth
copyright: true
accessRestrictedTo: 0

## General comment
Inventory refers to the production of 1 planting stock (1 unit).

## Included processes
The inventory includes the processes of soil cultivation, sowing, weed control, fertilisation, pest and pathogen control, harvest and balling. Machine infrastructure and a shed for machine sheltering is included. Inputs of fertilisers, pesticides and planting stocks as well as their transports to the farm are considered. The direct emissions on the field are also included. The system boundary is the field.

## Geography
Refers to an average production in Europe. Calculation based on inventory data for SE, PL, DE and GR. Production shares based on expert guess.

## Technology
Integrated production

## Time period
Starting point scenario for average agricultural and harvesting technology in the year 2004.

## Reference product
- planting stocks, miscanthus, at field [RER]: 1 unit

## Inputs from technosphere
- ammonium nitrate, as N, at regional storehouse [RER]: 0.00013198 kg; lognormal SD95 1.3221
  (4,4,1,1,1,5); application of fertilizer and average consumption
- ammonium sulphate, as N, at regional storehouse [RER]: 1.0153e-5 kg; lognormal SD95 1.3221
  (4,4,1,1,1,5); application of fertilizer and average consumption
- calcium ammonium nitrate, as N, at regional storehouse [RER]: 6.5992e-5 kg; lognormal SD95 1.3221
  (4,4,1,1,1,5); application of fertilizer and average consumption
- diammonium phosphate, as N, at regional storehouse [RER]: 1.8671e-5 kg; lognormal SD95 1.3221
  (4,4,1,1,1,5); application of fertilizer and average consumption
- urea, as N, at regional storehouse [RER]: 4.5687e-5 kg; lognormal SD95 1.3221
  (4,4,1,1,1,5); application of fertilizer and average consumption
- potassium chloride, as K2O, at regional storehouse [RER]: 0.00042607 kg; lognormal SD95 1.3221
  (4,4,1,1,1,5); application of fertilizer and average consumption
- potassium sulphate, as K2O, at regional storehouse [RER]: 2.7196e-5 kg; lognormal SD95 1.3221
  (4,4,1,1,1,5); application of fertilizer and average consumption
- lime, from carbonation, at regional storehouse [CH]: 0.00035505 kg; lognormal SD95 1.3221
  (4,4,1,1,1,5); application of fertilizer and average consumption
- diammonium phosphate, as P2O5, at regional storehouse [RER]: 4.7716e-5 kg; lognormal SD95 1.3221
  (4,4,1,1,1,5); application of fertilizer and average consumption
- single superphosphate, as P2O5, at regional storehouse [RER]: 3.4083e-6 kg; lognormal SD95 1.3221
  (4,4,1,1,1,5); application of fertilizer and average consumption
- thomas meal, as P2O5, at regional storehouse [RER]: 8.5207e-6 kg; lognormal SD95 1.3221
  (4,4,1,1,1,5); application of fertilizer and average consumption
- triple superphosphate, as P2O5, at regional storehouse [RER]: 6.987e-5 kg; lognormal SD95 1.3221
  (4,4,1,1,1,5); application of fertilizer and average consumption
- phosphate rock, as P2O5, beneficiated, dry, at plant [MA]: 4.0899e-5 kg; lognormal SD95 1.3221
  (4,4,1,1,1,5); application of fertilizer and average consumption
- planting stocks, miscanthus, at field [RER]: 0.0021006 unit; lognormal SD95 1.3221
  (4,4,1,1,1,5); establishment of the plantation
- benzimidazole-compounds, at regional storehouse [RER]: 4.2607e-8 kg; lognormal SD95 1.3221
  (4,4,1,1,1,5); pesticide use
- cyclic N-compounds, at regional storehouse [CH]: 1.5977e-7 kg; lognormal SD95 1.3221
  (4,4,1,1,1,5); pesticide use
- triazine-compounds, at regional storehouse [RER]: 3.6684e-6 kg; lognormal SD95 1.3221
  (4,4,1,1,1,5); pesticide use, Atrazine
- organophosphorus-compounds, at regional storehouse [RER]: 2.3644e-6 kg; lognormal SD95 1.3221
  (4,4,1,1,1,5); pesticide use
- diesel, used by tractor [RER]: 0.00024166 kg; lognormal SD95 1.3221
  (4,4,1,1,1,5); machinery use
- transport, lorry 32t [RER]: 0.00024382 tkm; lognormal SD95 2.095
  (4,5,na,na,na,na); standard distances for transport of materials
- transport, van <3.5t [RER]: 1.8706e-7 tkm; lognormal SD95 2.095
  (4,5,na,na,na,na); standard distances for transport of materials
- transport, barge [RER]: 0.0012467 tkm; lognormal SD95 2.095
  (4,5,na,na,na,na); standard distances for transport of materials
- transport, freight, rail [RER]: 0.0003326 tkm; lognormal SD95 2.095
  (4,5,na,na,na,na); standard distances for transport of materials

## Inputs from nature
- Carbon dioxide, in air [resource, in air]: 0.099815 kg; lognormal SD95 1.261
  (3,4,1,1,1,5); carbon uptake of plants
- Energy, gross calorific value, in biomass [resource, biotic]: 1.0648 MJ; lognormal SD95 1.261
  (3,4,1,1,1,5); energy content of harvested product
- Water, rain [resource, in water]: 0.024012 m3; lognormal SD95 1.261
  (3,4,1,1,1,5); average rainfall in the region during the plantation
- Water, river [resource, in water]: 0.011005 m3; lognormal SD95 1.3221
  (4,4,1,1,1,5); water used for irrigation
- Occupation, arable [resource, land]: 0.040829 m2a; lognormal SD95 1.2788
  (3,4,1,1,1,5); land occupation
- Transformation, from pasture and meadow, extensive [resource, land]: 0.0072384 m2; lognormal SD95 1.3377
  (3,4,1,1,1,5); transformation of set aside land
- Transformation, to arable [resource, land]: 0.0072384 m2; lognormal SD95 1.3377
  (3,4,1,1,1,5); transformation to energy crops

## Emissions to nature
- Ammonia [air, low population density]: 1.5023e-5 kg; lognormal SD95 1.4751
  (4,4,1,5,3,5); model calculation for emissions based on fertilizer application
- Dinitrogen monoxide [air, low population density]: 1.1086e-5 kg; lognormal SD95 1.7012
  (4,4,1,5,3,5); model calculation for emissions based on fertilizer application
- Isoprene [air, low population density]: 8.992e-5 kg; lognormal SD95 5.315
  (5,na,na,3,3,3); model calculation for biogenic emissions based on literature
- Terpenes [air, low population density]: 4.4187e-6 kg; lognormal SD95 5.315
  (5,na,na,3,3,3); model calculation for biogenic emissions based on literature
- Nitrogen oxides [air, low population density]: 2.3281e-6 kg; lognormal SD95 1.7012
  (4,4,1,5,3,5); model calculation for emissions based on fertilizer application
- Cadmium [soil, agricultural]: 1.5656e-8 kg; lognormal SD95 1.7012
  (4,4,1,5,3,5); input-output balance for seeds, products and fertilizer
- Chromium [soil, agricultural]: 2.0217e-7 kg; lognormal SD95 1.7012
  (4,4,1,5,3,5); input-output balance for seeds, products and fertilizer
- Copper [soil, agricultural]: 2.9959e-8 kg; lognormal SD95 1.7012
  (4,4,1,5,3,5); input-output balance for seeds, products and fertilizer
- Lead [soil, agricultural]: 1.4365e-8 kg; lognormal SD95 1.7012
  (4,4,1,5,3,5); input-output balance for seeds, products and fertilizer
- Mercury [soil, agricultural]: 3.5606e-11 kg; lognormal SD95 1.7012
  (4,4,1,5,3,5); input-output balance for seeds, products and fertilizer
- Nickel [soil, agricultural]: 2.5994e-8 kg; lognormal SD95 1.7012
  (4,4,1,5,3,5); input-output balance for seeds, products and fertilizer
- Zinc [soil, agricultural]: 3.0273e-7 kg; lognormal SD95 1.7012
  (4,4,1,5,3,5); input-output balance for seeds, products and fertilizer
- Atrazine [soil, agricultural]: 3.6684e-6 kg; lognormal SD95 1.4751
  (4,4,1,5,3,5); pesticide application, 500g/l
- Carbendazim [soil, agricultural]: 4.2607e-8 kg; lognormal SD95 1.4751
  (4,4,1,5,3,5); pesticide application, sportak alpha 380 EC
- Glyphosate [soil, agricultural]: 2.3644e-6 kg; lognormal SD95 1.4751
  (4,4,1,5,3,5); Roundup 360 SL, 360g/l
- Prochloraz [soil, agricultural]: 1.5977e-7 kg; lognormal SD95 1.4751
  (4,4,1,5,3,5); pesticide application, sportak alpha 380 EC
- Nitrate [water, ground-]: 0.0006173 kg; lognormal SD95 1.7012
  (4,4,1,5,3,5); model calculation for emissions based on fertilizer application
- Phosphate [water, ground-]: 7.5073e-7 kg; lognormal SD95 1.7012
  (4,4,1,5,3,5); model calculation for emissions based on fertilizer application
- Phosphate [water, river]: 2.4181e-6 kg; lognormal SD95 1.7012
  (4,4,1,5,3,5); model calculation for emissions based on fertilizer application
- Phosphorus [water, river]: 1.8818e-8 kg; lognormal SD95 1.7012
  (4,4,1,5,3,5); emission due to erosion

## Sampling procedure
Data were compiled by experts from Poland, Greece, Germany and Sweden from statistics, pilot network, fertilising recommendations, documents from extension services, information provided by retailers, literature and expert knowledge. The production data were verified and adjusted by the project team.

## Extrapolations
Average of two literature sources.

## Sources
- Jungbluth N., Faist Emmenegger M., Frischknecht R., Tuchschmid M., 2007, LCA of BTL-fuel production: Inventory Analysis, RENEW project report Del. 5.2.7, 0, ESU-services Ltd., Uster, CH
- Nikolaou A, 2006, Regional inventory data for biomass production: Southern Europe, RENEW project report Del. 5.2.6, 0, ESU-services Ltd., Uster, CH
- Lantz M, 2006, Regional inventory data for biomass production: Northern Europe, RENEW project report Del. 5.2.4, 0, ESU-services Ltd., Uster, CH
- Ganko E, 2006, Regional inventory data for biomass: Central-Eastern Europe, RENEW project report Del. 5.2.5, 0, ESU-services Ltd., Uster, CH

## Validation
automatic validation
none
